########################################################
echo		screen
units		lj
atom_style	full
boundary	p p f

##### System setup  ######
region 		myregion block -5.0 5.0 -5.0 5.0 -12.0 12.0 units box

region		fluid block -5.0 5.0 -5.0 5.0 -10.0 10.0 units box
region		wall1 block -5.0 5.0 -5.0 5.0 -12.0 -10.0 units box
region		wall2 block -5.0 5.0 -5.0 5.0 10.0 12.0 units box

create_box	3 myregion

create_atoms	1 random 1000 87183 fluid	# Creating fluid particles with a density of 0.5

lattice  	fcc 1.0				# Creating wall particles with a fcc lattice density of 1.0

create_atoms 	2 region wall1
create_atoms 	3 region wall2

mass 		1 1.0
mass 		2 1.0
mass 		3 1.0

write_data 	poiseuille.lmpsys
#
###### Defining groups ######
group 		system type 1 2 3

group           fluid type 1

group           bot type 2
group           top type 3
group		wall type 2 3
#
###### Interaction potentials ######
pair_style 	lj/cut 2.5

#pair_coeff      1 1 1.0 1.0
#pair_coeff      1 3* 1.0 1.0
#pair_coeff      3 3* 1.0 1.0

## OR ##
pair_coeff 	* * 1.0 1.0
#
######  Timestep & minimization  ######
timestep        0.001
neighbor        1.0 bin
neigh_modify    every 1 delay 0 check yes
neigh_modify    exclude group wall wall

velocity        fluid create 1.0 123456

fix             fxwall wall setforce 0.0 0.0 0.0
minimize        1.0e-6 1.0e-6 1000000 1000000
reset_timestep  0
#
######  Thermostating the fluid using Nos'e-Hoover thermostat  ######
fix             fxnvt_fluid fluid nvt temp 1.0 1.0 $(100.0*dt)

compute         wall_temp wall temp
compute         fluid_temp fluid temp
fix_modify      fxnvt_fluid temp fluid_temp

thermo          10
thermo_style    custom step press temp c_wall_temp c_fluid_temp ke pe etotal

dump            dmpall  all dcd 50 dump.dcd
dump_modify     dmpall unwrap yes

compute         cChunk fluid chunk/atom bin/1d z 0.0 0.1 units box bound z -15.9752 15.9752           # binwidth 0.1
fix             fx_vel1 fluid ave/chunk 1 10000 10000 cChunk vx vy vz file ./vel1.dat

run             10000
unfix 		fx_vel1
#
###### Application of external field ######
fix             fxacc fluid gravity 0.075 vector 1 0 0

run		10000
#reset_timestep  0
#
###### Output ######
#compute         cChunk fluid chunk/atom bin/1d z 0.0 0.1 units box bound z -15.9752 15.9752           # binwidth 0.1
fix             fx_vel2 fluid ave/chunk 1 10000 10000 cChunk vx vy vz file ./vel2.dat

#fix             fx_den fluid ave/chunk 1 10000 10000 cChunk density/mass file ./den.dat

run             10000
